# -*- coding: utf-8 -*-
"""
Step 3: Move the content of the ElasticBody in a separated file for reusability
"""
from math import *
import Sofa

angle_tetra = [
72.99260494352605, 63.15747148579301, -162.32884174899723, -117.39760200352409, 107.73818521541331, -27.464548689149588, -62.76754711614042, 152.72886251764646, 17.56980455510228, 162.48023871068634, 27.312462938199285, -107.69197315333322, 117.45450086844028, -72.46657906891494, -152.5696890431506, -17.761438226653457, 97.05155249634278, 84.4847613262374, 173.54305666186013, -83.56659366475533, -51.582813557752935, -173.4277674951896, -90.07249555101181, -38.59419484662537, -134.97669869852234, 135.07069525978218, -6.577918317877607, -141.50717881921958, 141.5959566503361, 6.4259422028243876,
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  65.57706300392901
]

# print(angle_spiral)
offset = -130
angle_spiral = [i-offset for i in angle_tetra] #[i-150+90 for i in angle_tetra] # +50
directions_spiral = []
for angle in angle_spiral:
    # print(angle,math.cos(radians(angle)),math.sin(angle))
    directions_spiral.append([cos(radians(angle)),0.0,sin(radians(angle))])
# print(directions_spiral)
nbr_tretra = 579
transverse_anisotropy_coef = [[4,1.0,0,0]]*nbr_tretra
anisotropyDirections = [[0,1,0]]*nbr_tretra
# TRANSVERSE ONLY

# #FOR 15% AND SIGMA 0.1
# youngModulusTransverse = 1390
# poissonRatioTransverse = 0.26162 #(yz)
# youngModulusLongitudinal = 94.22
# poissonRatioTransverseLongitudinal = 0.4161  #(zx)
# shearModulusLongitudinal = 16.28215
# poissonRatioLongitudinalTransverse = 0.02975 #(xy)
# ################################################

# #FOR 15% AND SIGMA 0.1
# youngModulusTransverse = 1390
# poissonRatioTransverse = 0.26162 #(yz)
# youngModulusLongitudinal = 1390
# poissonRatioTransverseLongitudinal = 0.26162  #(zx)
# shearModulusLongitudinal = 550.879
# poissonRatioLongitudinalTransverse = 0.26162 #(xy)
# ################################################

# youngModulusValues = [94+i*216 for i in range(7)]
# poissonRatioValues = [0.4161-i*0.02575 for i in range(7)]
# value = 6
# # print(youngModulusValues,poissonRatioValues)
# print(youngModulusValues[value],poissonRatioValues[value])

# #FOR TEST ANISOTROPY
# youngModulusTransverse = 1390
# poissonRatioTransverse = 0.2616 #(yz)
# youngModulusLongitudinal = 94 #youngModulusValues[value]
# poissonRatioTransverseLongitudinal = poissonRatioValues[value]  #(zx)
# shearModulusLongitudinal = youngModulusLongitudinal/(2*(1-poissonRatioTransverseLongitudinal))
# poissonRatioLongitudinalTransverse = 0.02975 #(xy)
# ################################################
youngModulusTransverse = 250
poissonRatioTransverse = 0.45 #(yz)
youngModulusLongitudinal = 250 #youngModulusValues[value]
poissonRatioTransverseLongitudinal = 0.45  #(zx)
shearModulusLongitudinal = youngModulusLongitudinal/(2*(1-poissonRatioTransverseLongitudinal))
poissonRatioLongitudinalTransverse = 0.45 #(xy)

youngModulus= [youngModulusTransverse]*nbr_tretra
poissonRatio= [poissonRatioTransverse]*nbr_tretra

for i in range(nbr_tretra):
    anisotropyDirections[i] = directions_spiral[i]
    transverse_anisotropy_coef[i] = [2,youngModulusLongitudinal,poissonRatioTransverseLongitudinal, shearModulusLongitudinal]
    # transverse_anisotropy_coef[i] = [4,1,poissonRatioTransverseLongitudinal, shearModulusLongitudinal]


def ElasticBody(name="ElasticBody", rotation=[0, 0, 0], translation=[0, 0, 0], color=[1.0, 1.0, 1.0, 1.0]):
    # To simulate an elastic object, we need:
    # - a deformation law (here linear elasticity)
    # - a solving method (here FEM)
    # - as we are using FEM we need a space discretization (here tetrahedron)
    self = Sofa.Core.Node(name)
    mechanicalmodel = self.addChild("MechanicalModel")
    mechanicalmodel.addObject('GIDMeshLoader',
                              name='loader',
                              rotation=rotation,
                              translation=translation,
                              filename='data/mesh/tripod_low.gidmsh')
    mechanicalmodel.addObject('MeshTopology',
                              src='@loader',
                              name='container')

    mechanicalmodel.addObject('MechanicalObject',
                              name='dofs',
                              position=mechanicalmodel.loader.position.getLinkPath(),
                              showObject=False,
                              showObjectScale=5.0)
    mechanicalmodel.addObject('UniformMass',
                              name="mass",
                              totalMass=0.032)

    # ForceField components

    # mechanicalmodel.addObject('TetrahedronFEMForceField',
    #                           name="linearElasticBehavior",
    #                           youngModulus=250,
    #                           poissonRatio=0.45)

    high_fem = mechanicalmodel.addObject('TetrahedronAnisotropicForceField',
                              name="Elasticity",  printLog=1,  poissonRatio=poissonRatio,  youngModulus=youngModulus,
                              # integrationMethod='analytical',
                              # method='qr',
                              # forceAffineAssemblyForAffineElements=False,
                              # oneRotationPerIntegrationPoint=False,
                              # numericalIntegrationMethod='Tetrahedron Gauss',
                              # integrationOrder=1,
                              # transparency= 0.75,
                              drawHeterogeneousTetra=False)
    high_fem.elasticitySymmetry   = 'transverseIsotropic'
    high_fem.anisotropyParameters = transverse_anisotropy_coef
    high_fem.anisotropyDirections = anisotropyDirections

    # Visual model
    # visualmodel = Sofa.Core.Node("VisualModel")
    # # Specific loader for the visual model
    # visualmodel.addObject('MeshSTLLoader',
    #                       name='loader',
    #                       filename='data/mesh/tripod_mid.stl',
    #                       rotation=rotation,
    #                       translation=translation)
    # visualmodel.addObject('OglModel',
    #                       src=visualmodel.loader.getLinkPath(),
    #                       name='renderer',
    #                       color=color)
    # self.addChild(visualmodel)
    #
    # visualmodel.addObject('BarycentricMapping',
    #                       input=mechanicalmodel.dofs.getLinkPath(),
    #                       output=visualmodel.renderer.getLinkPath())
    return self


def createScene(rootNode):
    from stlib3.scene import Scene

    pluginsList = [
        'Sofa.Component.IO.Mesh',  # Needed to use components [GIDMeshLoader,MeshSTLLoader]
        'Sofa.Component.LinearSolver.Direct',  # Needed to use components [SparseLDLSolver]
        'Sofa.Component.Mapping.Linear',  # Needed to use components [BarycentricMapping]
        'Sofa.Component.Mass',  # Needed to use components [UniformMass]
        'Sofa.Component.SolidMechanics.FEM.Elastic',  # Needed to use components [TetrahedronFEMForceField]
        'Sofa.Component.StateContainer',  # Needed to use components [MechanicalObject]
        'Sofa.Component.Topology.Container.Constant',  # Needed to use components [MeshTopology]
        'Sofa.Component.Visual',  # Needed to use components [VisualStyle]
        'Sofa.GL.Component.Rendering3D',  # Needed to use components [OglModel,OglSceneFrame]
        'Sofa.GUI.Component',  # Needed to use components [AttachBodyButtonSetting]
    ]

    scene = Scene(rootNode, gravity=[0.0, -9810, 0.0], plugins=pluginsList,
                  iterative=False)
    scene.addMainHeader()
    scene.addObject('DefaultAnimationLoop')
    scene.addObject('DefaultVisualManagerLoop')
    scene.Simulation.addChild(ElasticBody())
