# -*- coding: utf-8 -*-
import os
import math
from math import pi

from stlib3.scene import Scene
from splib3.numerics import *
#from splib.numerics import Transform

path = os.path.dirname(os.path.abspath(__file__))
path_mesh = path + "/../mesh/"

from utility.tutorial import *
from utility.tripod_HighOrder import Tripod
from utility.tripodcontroller import TripodController, setupanimation, TripodControllerWithCom, SerialPortController, GoalController, DirectController, MultipleTripodController, CenterController

# Description of how the communication is handled
def SerialPortBridgeGeneric(rootNode, serialport="/dev/ttyUSB0"):
    return rootNode.createObject("SerialPortBridgeGeneric", port=serialport, baudRate=115200, size=3, listening=True, header=255,packetOut=[61,61,61])


volumeMeshFileName=  path_mesh + "tripod_coarse_04_test.vtk"
surfaceMeshFileName=  path_mesh + "tripod.stl"
nbr_tretra = 2650

direct = True
inverse = False
use_orientation=False
control_real = True

def Inverse(node,translation,rotation):
    tr_goal = translation[:]
    if use_orientation:
        # inverse in orientation
        tr_goal[1] += 60
    else:
        tr_goal[1] += 40

    r = Transform(tr_goal, eulerRotation=rotation)
    goal_pos = r.toSofaRepr()

    # EffectorGoal
    goal = node.createChild('goal')
    goal.createObject('EulerImplicitSolver', firstOrder=True)
    goal.createObject('CGLinearSolver', iterations=100, threshold=1e-5, tolerance=1e-5)
    goal.createObject('MechanicalObject', name='goalMO', template='Rigid3d',
                      position=goal_pos+[0., 0., 0., 1.], showObject=True, showObjectScale=10,drawMode=3)
    spheres = goal.createChild('spheres')
    spheres.createObject('MechanicalObject', name='mo', position='0 0 0  10 0 0   0 10 0   0 0 10')
    # spheres.createObject('Sphere', radius=2, group=1)
    spheres.createObject('RigidMapping')
    goal.createObject('UncoupledConstraintCorrection')

    return goal

def createScene(rootNode):
    scene = Scene(rootNode, gravity=[0.0, 0.0, 0.0],plugins=['SofaOpenglVisual','SoftRobots','SofaHighOrderTopology','SofaHighOrderFEM','BeamAdapter'],direct=direct) #,'SoftRobots.Inverse',"ConectToOptiTrack"])
    scene.VisualStyle.displayFlags = "showForceFields showBehavior"
    scene.createObject('BackgroundSetting', color=[0,0,0])

    totalMass=0.032

    if inverse:
        scene.createObject("RequiredPlugin", name="SoftRobots.Inverse")
        scene.createObject("FreeMotionAnimationLoop")
        scene.createObject('QPInverseProblemSolver', name="QP", printLog='0')

    scene.createObject('FreeMotionAnimationLoop')
    scene.createObject('GenericConstraintSolver')

    ########################################################################################################################################################
    # TETRA & ANGLE
    ########################################################################################################################################################
    def tetra_and_angle(top=True,offset=-150):
        boxes_ROI = [[[],[],[]],[[],[],[]],[[],[],[]]]
        directions_spiral = []
        directions = []
        ## volumeMeshFileName="data/mesh/tripod_015.vtk"
        # boxes_ROI[1][0] = [[15], [35], [36], [43], [44], [45], [48], [49], [54], [55], [64], [65], [71], [74], [75], [84], [85], [86], [87], [89], [96], [100], [123], [124], [125], [127], [140], [142], [143], [144],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[9536]]
        # boxes_ROI[1][1] = [[0], [2], [3], [4], [5], [6], [11], [12], [13], [14], [16], [17], [18], [23], [25], [26], [27], [28], [32], [33], [42], [47], [51], [52], [53], [58], [61], [70], [76], [83],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[9547]]
        # boxes_ROI[1][2] = [[1], [9], [10], [19], [20], [21], [22], [24], [29], [30], [31], [37], [38], [46], [50], [60], [62], [63], [67], [69], [72], [77], [78], [79], [80], [81], [82], [90], [91], [98],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[9583]]
        # angle_tetra = [284.1431986500402, 57.374421260947706, 310.44865691840624, 310.4649452035994, 283.0885961950436, 275.816509739124, 296.87851626746664, 73.05082544456958, 73.05647548510389, 60.30215855153927, 60.54239811482641, 283.18922638857333, 284.2531309332513, 281.8888491057917, 306.977056228115, 194.2739238615253, 297.0599072033366, 297.05763601336406, 297.9603914727157, 69.91016842162156, 69.91638373958669, 359.01068712886195, 358.99993709993134, 284.9377843265577, 55.46141839068636, 283.89717786346375, 282.86340644822315, 275.2302530903341, 307.7054293007319, 55.24780864887203,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73.33651525246013]
        #########################

        ## volumeMeshFileName="data/mesh/tripod_coarse_04.vtk"
        boxes_ROI[1][0] = [[0], [3], [4], [14], [17], [20], [68], [84], [96], [110], [117], [127], [146], [148], [160], [169], [172], [175], [183], [187], [194], [199], [208], [209], [211], [212], [222], [227], [239], [252],
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  [2698]]
        boxes_ROI[1][1] = [[8], [16], [49], [78], [79], [95], [101], [105], [113], [121], [142], [166], [168], [177], [179], [197], [206], [214], [221], [234], [245], [248], [249], [264], [267], [268], [269], [272], [274], [276],
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  [2708]]
        boxes_ROI[1][2] = [[82], [85], [97], [112], [115], [120], [149], [156], [163], [170], [185], [191], [196], [198], [202], [226], [236], [253], [257], [259], [270], [285], [291], [296], [298], [302], [315], [322], [325], [326],
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  [2672]]
        angle_tetra = [189.57899456007425, 11.078174781957232, 12.505850018127802, 188.97571466592635, 190.21324445197283, 179.55541146130534, 12.057435284810632, 13.411648567560297, 295.3777610089732, 112.8278050514768, 141.30824434835137, 142.07218400637856, 79.88174291307536, 60.35353854227617, 191.12613600482337, 26.652020494679714, 293.02125731295877, 190.5924260530599, 154.38284669774842, 60.49063142073996, 191.13317255150733, 79.5139390425307, 141.30990304248303, 25.65709914984383, 80.91539126401847, 15.227226300213587, 149.79934755595897, 173.88881381488662, 332.39029522811376, 88.75665284021093,
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  48.09759350059707]
        base_indices = [[4], [280], [309], [496], [930], [956], [985], [1033], [1403], [1437], [1468], [1522], [1579], [1592], [1788], [1797], [1894], [1963], [2012], [2014], [2049], [2064], [2067], [2092], [2098], [2201], [2286], [2295], [2296], [2304], [2305], [2315], [2316], [2325], [2330], [2338], [2339], [2340], [2355], [2360], [2476], [2516], [2517], [2528], [2530], [2531], [2549], [2554], [2607], [2629], [2631], [2656], [2669], [2693]]
        #########################
        if top:
            angle_tetra = [299.0273209645404, 161.44591579449926, 292.8539361171772, 168.17537465316255, 162.6128549204215, 283.55255003277784, 158.1057804412193, 48.026533063729985, 287.804686592888, 138.8761940280763, 258.8761940280764, 156.6943908200976, 181.32741818288238, 176.4650157244693, 161.21372414509773, 169.796320443621, 161.4652868179089, 131.92411329896285, 251.92411329896294, 167.97352878281615, 263.678628399216, 338.41054196801275, 41.04169728561095, 61.32426241787248, 137.54707359597498, 257.547073595975, 156.18838900086777, 299.86182835817124, 178.32856678377948, 24.21861540650492,
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  310.9328565806702]
        else:
            angle_tetra = [60.97267903545957, 198.55408420550074, 67.14606388282279, 191.82462534683745, 197.38714507957852, 76.44744996722214, 201.89421955878072, 311.97346693627003, 72.19531340711201, 221.12380597192373, 101.12380597192364, 203.3056091799024, 178.67258181711765, 183.5349842755307, 198.78627585490224, 190.20367955637906, 198.53471318209114, 228.07588670103718, 108.07588670103708, 192.02647121718383, 96.32137160078403, 21.589458031987217, 318.95830271438905, 298.6757375821275, 222.45292640402505, 102.452926404025, 203.81161099913223, 60.13817164182878, 181.67143321622058, 335.78138459349503,
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  49.06714341932975]
        # print(angle_spiral)
        angle_spiral = [i-offset for i in angle_tetra] #[i-150+90 for i in angle_tetra] # +50

        for angle in angle_spiral:
            # print(angle,math.cos(radians(angle)),math.sin(angle))
            directions_spiral.append([sin(radians(angle)),0.0,cos(radians(angle))])

        for k in range(3):
            tmp = []
            for i in boxes_ROI[0][k] :
                if i not in boxes_ROI[1][k]:
                    tmp.append(i)
                    # print("NOT EQUAL")

            boxes_ROI[0][k] = tmp

        return directions_spiral

    ########################################################################################################################################################
    #   TRIPOD REF #########################################################################################################################################
    ########################################################################################################################################################
    def tripod_ref(name="Tripod_ISO",surfaceColor=[1.0,0.0,0.0]):
        if inverse: goalNode = (Inverse(scene,rotation,translation),use_orientation)
        else: goalNode = None

        poissonRatio=[0.45]*nbr_tretra
        youngModulus=[1200]*nbr_tretra

        tripod = Tripod(scene.Modelling,name=name,ho=False,direct=direct,inverse=goalNode,
                        volumeMeshFileName=volumeMeshFileName,
                        translation=translation, rotation=rotation,
                        youngModulus=youngModulus[0], poissonRatio=poissonRatio[0], totalMass=totalMass) #,surfaceColor=surfaceColor,surfaceMeshFileName=surfaceMeshFileName)

        # scene.Simulation.addChild(tripod.ElasticBody.ElasticMaterialObject)
        scene.Simulation.addChild(tripod.ActuatedArm0)
        scene.Simulation.addChild(tripod.ActuatedArm1)
        scene.Simulation.addChild(tripod.ActuatedArm2)
        # scene.Simulation.addChild(tripod.RigidifiedStructure.DeformableParts)
        scene.Simulation.addChild(tripod.RigidifiedStructure)

        if direct:
            scene.Simulation.createObject('MechanicalMatrixMapper',name='MMM_'+tripod.name,
                                template='Vec3,Rigid3',
                                object1=tripod.RigidifiedStructure.DeformableParts.getLinkPath(),
                                object2=tripod.RigidifiedStructure.RigidParts.dofs.getLinkPath(),
                                nodeToParse = tripod.ElasticBody.ElasticMaterialObject.getLinkPath())


        optitrack = None
        if control_real:
            serial = SerialPortBridgeGeneric(scene)

            # The real robot receives data from the 3 actuators
            serialportctrl = SerialPortController(scene, tripod.actuatedarms, serial,optitrack,tripod.RigidifiedStructure.RigidParts.dofs)

            TripodControllerWithCom(scene, tripod,[tripod.ActuatedArm0, tripod.ActuatedArm1, tripod.ActuatedArm2], serialportctrl)

        else:
            # The simulation's control with keystrokes is still available
            TripodController(scene, tripod,[tripod.ActuatedArm0, tripod.ActuatedArm1, tripod.ActuatedArm2])

        if inverse:
            # You can add a GoalController and play with it
            #GoalController(goalNode[0],[tripod.RigidifiedStructure.RigidParts.actuators,tripod.ActuatedArm0.ServoArm.actuator, tripod.ActuatedArm1.ServoArm.actuator, tripod.ActuatedArm2.ServoArm.actuator])
            GoalController(goalNode[0],[tripod.RigidifiedStructure.RigidParts.actuators,tripod.ActuatedArm0.ServoMotor.Angle.actuator, tripod.ActuatedArm1.ServoMotor.Angle.actuator, tripod.ActuatedArm2.ServoMotor.Angle.actuator])

    ########################################################################################################################################################
    #   TRIPOD TRANSVERSE ##################################################################################################################################
    ########################################################################################################################################################
    def tripod_transverse(name="Tripod_HO",directions_spiral=None,translation=None,rotation=None,elasticitySymmetry='transverseIsotropic'):
        if inverse: goalNode = (Inverse(scene,rotation,translation),use_orientation)
        else: goalNode = None

        transverse_anisotropy_coef = [[4,1.0,0,0]]*nbr_tretra
        anisotropyDirections = [[0,1,0]]*nbr_tretra

        #######################################################################################################################################################
        # TRANSVERSE ONLY

        # #FOR 15% AND SIGMA 0.1
        # youngModulusTransverse = 1390
        # poissonRatioTransverse = 0.26162 #(yz)
        # youngModulusLongitudinal = 94.22
        # poissonRatioTransverseLongitudinal = 0.4161  #(zx)
        # shearModulusLongitudinal = 16.28215
        # poissonRatioLongitudinalTransverse = 0.02975 #(xy)
        # ################################################

        # #FOR 15% AND SIGMA 0.1
        # youngModulusTransverse = 1390
        # poissonRatioTransverse = 0.26162 #(yz)
        # youngModulusLongitudinal = 1390
        # poissonRatioTransverseLongitudinal = 0.26162  #(zx)
        # shearModulusLongitudinal = 550.879
        # poissonRatioLongitudinalTransverse = 0.26162 #(xy)
        # ################################################

        youngModulusValues = [94+i*216 for i in range(7)]
        poissonRatioValues = [0.4161-i*0.02575 for i in range(7)]
        value = 6
        # print(youngModulusValues,poissonRatioValues)
        print(youngModulusValues[value],poissonRatioValues[value])

        # #FOR TEST ANISOTROPY
        youngModulusTransverse = 1390
        poissonRatioTransverse = 0.2616 #(yz)
        youngModulusLongitudinal = 94 #youngModulusValues[value]
        poissonRatioTransverseLongitudinal = poissonRatioValues[value]  #(zx)
        shearModulusLongitudinal = youngModulusLongitudinal/(2*(1-poissonRatioTransverseLongitudinal))
        poissonRatioLongitudinalTransverse = 0.02975 #(xy)
        # ################################################

        youngModulus= [youngModulusTransverse]*nbr_tretra
        poissonRatio= [poissonRatioTransverse]*nbr_tretra

        for i,tetra in enumerate(directions_spiral):
            anisotropyDirections[i] = directions_spiral[i]
            transverse_anisotropy_coef[i] = [2,youngModulusLongitudinal,poissonRatioTransverseLongitudinal, shearModulusLongitudinal]
            # transverse_anisotropy_coef[i] = [4,1,poissonRatioTransverseLongitudinal, shearModulusLongitudinal]
        #######################################################################################################################################################


        tripod = Tripod(scene.Modelling,name=name,ho=True,direct=direct,inverse=goalNode,
                        elasticitySymmetry=elasticitySymmetry,
                        translation=translation, rotation=rotation,
                        withAnysotropy=True,
                        volumeMeshFileName=volumeMeshFileName,
                        youngModulus=youngModulus, poissonRatio=poissonRatio, totalMass=totalMass,
                        anisotropyParameters=transverse_anisotropy_coef,anisotropyDirections = anisotropyDirections,color=[0,1,0],iterativeSolver=False)


        #scene.Simulation.addChild(tripod.ElasticBody.ElasticMaterialObject.highOrder_node)
        node = scene.Simulation.createChild(name)
        node.addChild(tripod.ActuatedArm0)
        node.addChild(tripod.ActuatedArm1)
        node.addChild(tripod.ActuatedArm2)
        node.addChild(tripod.RigidifiedStructure)

        node.createObject('MechanicalMatrixMapper',
                            template='Vec3,Rigid3',
                            object1=tripod.RigidifiedStructure.DeformableParts.getLinkPath(),
                            object2=tripod.RigidifiedStructure.RigidParts.dofs.getLinkPath(),
                            nodeToParse = tripod.ElasticBody.ElasticMaterialObject.highOrder_node.getLinkPath())

        # With comm
        # # addContact(scene)
        # # tripod.addCollision()

        # # OPTITRACK
        optitrack = None
        # # optitrack = tripod.RigidifiedStructure.createChild("optitrack")
        # # optitrack.createObject('ConnectToOptiTrack',name="Connect", drawMarkers="1", drawTrackedMarkersColor="1 0 1 1")
        # # optitrack.createObject('MechanicalObject', template="Rigid3d", name="Markers", position="@Connect.Barycenter",showObject=False,showObjectScale=10, drawMode=2)

        #serial = SerialPortBridgeGeneric(scene)

        # # The real robot receives data from the 3 actuators
        #serialportctrl = SerialPortController(scene, tripod.actuatedarms, serial,optitrack,tripod.RigidifiedStructure.RigidParts.dofs)

        # The simulation's control with keystrokes is still available
        #TripodControllerWithCom(scene, tripod,[tripod.ActuatedArm0, tripod.ActuatedArm1, tripod.ActuatedArm2], serialportctrl)
        TripodController(scene, tripod,[tripod.ActuatedArm0, tripod.ActuatedArm1, tripod.ActuatedArm2])

        if inverse:
            # You can add a GoalController and play with it
            #DirectController(scene,tripod.actuatedarms)
            GoalController(goalNode[0],tripod.RigidifiedStructure.RigidParts.actuators)

        return tripod


    ########################################################################################################################################################

    # translation=[0.0, 0.0, 0.0]
    # rotation=[0, 0, 0]
    # tripod_ref()


    # directions_spiral = []
    # directions = []
    # translation=[0.0, 0.0, 0.0]
    # rotation=[0,0,0]
    # tripod_transverse("top",directions_spiral=tetra_and_angle(offset=-150),translation=translation,rotation=rotation,elasticitySymmetry='transverseIsotropic')
    # transverseIsotropic # isotropic # cubic


    ####################################################
    ####         TWO TRIPOD CONFIGURATION           ####
    ####################################################
    def two_tripod():

        top = tripod_transverse(name="top",directions_spiral=tetra_and_angle(),
                                           translation=[0,-90,0],rotation=[0,0,0])
        bottom = tripod_transverse(name="bottom",directions_spiral=tetra_and_angle(top=False,offset=-150),
                                                 translation=[0,90,0],rotation=[0,0,180])

        MultipleTripodController(scene,[top,bottom])

        ## BilateralInteractionConstraint
        # left = scene.Simulation.createChild('left')
        # left.createObject('MechanicalObject', name='dofs', template='Rigid3d',position=[0,30,0,0,0,0,1],showObject=True,showObjectScale=5)
        # left.createObject('RigidRigidMapping',input=top.RigidifiedStructure.RigidParts.dofs,output=left.dofs,index=3) #,initialPoints=position+orientation)

        # right = scene.Simulation.createChild('right')
        # right.createObject('MechanicalObject', name='dofs', template='Rigid3d',position=[0,30,0,0,0,1,0],showObject=True,showObjectScale=5)
        # right.createObject('RigidRigidMapping',input=bottom.RigidifiedStructure.RigidParts.dofs,output=right.dofs,index=3) #,initialPoints=position+orientation)

        # scene.Simulation.createObject('BilateralInteractionConstraint',template="Rigid3", object1=right.dofs, object2=left.dofs, first_point=0, second_point=0) #,keepOrientationDifference=True)
        #
        ####################################################

        #####   BEAM WITH 2 POINTS
        ## BeamInterpolation
        # multiMapping = top.RigidifiedStructure.RigidParts.createChild("Beam")
        # multiMapping.createObject('MechanicalObject', name='dofs', template='Rigid3d',position=[[0,0,0,0,0,sin(pi/2),cos(pi/2)],[0,0,0,0,0,-sin(pi/2),cos(pi/2)]],showObject=True,showObjectScale=15)
        # multiMapping.createObject('SubsetMultiMapping',template="Rigid3,Rigid3",input=top.RigidifiedStructure.RigidParts.dofs.getLinkPath() + " " + bottom.RigidifiedStructure.RigidParts.dofs.getLinkPath(),output=multiMapping.dofs.getLinkPath(),indexPairs=[0,3,1,3])
        # multiMapping.createObject('Mesh',position=[[0,0,0],[0,0,0]],edges=[0,1])
        # multiMapping.createObject('BeamInterpolation',dofsAndBeamsAligned=False,DOF0TransformNode0=[[0,0,0,0,0,sin(pi/4),cos(pi/4)]],DOF1TransformNode1=[[0,0,0,0,0,-sin(pi/4),cos(pi/4)]],lengthList=[60],straight=True,printLog=1)
        # multiMapping.createObject('AdaptiveBeamForceFieldAndMass',interpolation=multiMapping.BeamInterpolation.getLinkPath(),printLog=0,massDensity=0)

        # scene.Simulation.createObject('MechanicalMatrixMapper',name='MMM_Beam'+top.name,
        #                     template='Rigid3,Rigid3',
        #                     object1=top.RigidifiedStructure.RigidParts.dofs.getLinkPath(),
        #                     object2=bottom.RigidifiedStructure.RigidParts.dofs.getLinkPath(),
        #                     nodeToParse = "@/Simulation/top/RigidifiedStructure/RigidParts/Beam")#multiMapping.getLinkPath())
        ##########################################################


        #####   BEAM WITH 3 POINTS
        rigid_center = scene.Simulation.createChild("rigid_center")
        rigid_center.createObject("MechanicalObject", template='Rigid3d',name='dofs',position=[0,0,0,0,0,sin(pi/4),cos(pi/4)],showObject=True,showObjectScale=15)

        multiMapping = top.RigidifiedStructure.RigidParts.createChild("Beam")
        multiMapping.createObject('MechanicalObject', name='dofs', template='Rigid3d',position=[[0,0,0,0,0,0,1],[0,0,0,0,0,0,1],[0,0,0,0,0,0,1]],showObject=False,showObjectScale=20)
        multiMapping.createObject('SubsetMultiMapping',template="Rigid3,Rigid3",input=top.RigidifiedStructure.RigidParts.dofs.getLinkPath() + " " + rigid_center.dofs.getLinkPath() + " " + bottom.RigidifiedStructure.RigidParts.dofs.getLinkPath(),output=multiMapping.dofs.getLinkPath(),indexPairs=[0,3,1,0,2,3])
        multiMapping.createObject('Mesh',position=[[0,0,0],[0,0,0],[0,0,0]],edges=[0,1,1,2])
        multiMapping.createObject('BeamInterpolation',dofsAndBeamsAligned=False,defaultYoungModulus=10e16, DOF0TransformNode0=[[0,0,0,0,0,sin(pi/4),cos(pi/4)],[0,0,0,0,0,0,1]],DOF1TransformNode1=[[0,0,0,0,0,0,1],[0,0,0,0,0,-sin(pi/4),cos(pi/4)]],lengthList=[40,40],straight=True,printLog=1)
        multiMapping.createObject('AdaptiveBeamForceFieldAndMass',interpolation=multiMapping.BeamInterpolation.getLinkPath(),printLog=0,massDensity=0)


        scene.Simulation.createObject('MechanicalMatrixMapper',name='MMM_Beam'+top.name,
                            template='Rigid3,Rigid3',
                            object1=top.RigidifiedStructure.RigidParts.dofs.getLinkPath(),
                            object2=rigid_center.dofs.getLinkPath(),
                            nodeToParse = "@/Simulation/top/RigidifiedStructure/RigidParts/Beam")#multiMapping.getLinkPath())
        scene.Simulation.createObject('MechanicalMatrixMapper',name='MMM_Beam'+bottom.name,
                            template='Rigid3,Rigid3',
                            object1=rigid_center.dofs.getLinkPath(),
                            object2=bottom.RigidifiedStructure.RigidParts.dofs.getLinkPath(), skipJ1tKJ1=True,
                            nodeToParse = "@/Simulation/top/RigidifiedStructure/RigidParts/Beam")#multiMapping.getLinkPath())
        ##########################################################

        bottom.RigidifiedStructure.RigidParts.addChild(multiMapping)


        ####################################################

    two_tripod()


    # import colorsys
    # name = "RAINBOW-tripods"
    # name = "azertyuiopqsdfghjkl"
    # length = len(name)
    # step = 360./length
    # color_step = 1./length
    # tmp = []
    # for i in range(length):
    #     rotation=[50,0,i*step]
    #     translation = transformPositions([[200.0, 0.0, 0.0]], translation=[0,0,0], eulerRotation=rotation, scale=[1.0,1.0,1.0])[0] #self.rotation
    #     # tripod_transverse(name[i])

    #     (r, g, b) = colorsys.hsv_to_rgb(i*color_step, 1.0, 1.0)
    #     R, G, B = int(255 * r), int(255 * g), int(255 * b)
    #     tmp.append(([r,g,b],[R,G,B]))
    #     tripod_ref(name[i],surfaceColor=[R,G,B])

    # print(tmp)

    # [([1.0, 0.0, 0.0], [255, 0, 0]),
    # ([1.0, 0.3157894736842105, 0.0], [255, 80, 0]),
    # ([1.0, 0.631578947368421, 0.0], [255, 161, 0]),
    # ([1.0, 0.9473684210526315, 0.0], [255, 241, 0]),
    # ([0.736842105263158, 1.0, 0.0], [187, 255, 0]),
    # ([0.42105263157894735, 1.0, 0.0], [107, 255, 0]),
    # ([0.10526315789473695, 1.0, 0.0], [26, 255, 0]),
    # ([0.0, 1.0, 0.21052631578947345], [0, 255, 53]),
    # ([0.0, 1.0, 0.5263157894736841], [0, 255, 134]),
    # ([0.0, 1.0, 0.8421052631578947], [0, 255, 214]),
    # ([0.0, 0.8421052631578947, 1.0], [0, 214, 255]),
    # ([0.0, 0.5263157894736841, 1.0], [0, 134, 255]),
    # ([0.0, 0.2105263157894739, 1.0], [0, 53, 255]),
    # ([0.10526315789473628, 0.0, 1.0], [26, 0, 255]),
    # ([0.4210526315789469, 0.0, 1.0], [107, 0, 255]),
    # ([0.7368421052631575, 0.0, 1.0], [187, 0, 255]),
    # ([1.0, 0.0, 0.9473684210526319], [255, 0, 241]),
    # ([1.0, 0.0, 0.6315789473684212], [255, 0, 161]),
    # ([1.0, 0.0, 0.3157894736842106], [255, 0, 80])]

    # (r, g, b) = colorsys.hsv_to_rgb(0.15, 1.0, 1.0)
    # R, G, B = int(255 * r), int(255 * g), int(255 * b)
    # tripod_ref("a",surfaceColor=[R,G,B,1])
    # (r, g, b) = colorsys.hsv_to_rgb(0.65, 1.0, 1.0)
    # R, G, B = int(255 * r), int(255 * g), int(255 * b)
    # tripod_ref("z",surfaceColor=[R,G,B,1])
    # (r, g, b) = colorsys.hsv_to_rgb(0.85, 1.0, 1.0)
    # R, G, B = int(255 * r), int(255 * g), int(255 * b)
    # tripod_ref("e",surfaceColor=[R,G,B,1])
    # (r, g, b) = colorsys.hsv_to_rgb(0.05, 1.0, 1.0)
    # R, G, B = int(255 * r), int(255 * g), int(255 * b)
    # tripod_ref("r",surfaceColor=[R,G,B,1])
