# -*- coding: utf-8 -*-
""" ActuatedArm for the tripod robot.

    This model is part of the SoftRobot toolkit available at:
        https://github.com/SofaDefrost/SoftRobots

    Available prefab:
        - ActuatedArm
        - ServoArm
"""
import os
from splib.numerics import vec3
from splib.objectmodel import SofaPrefab
from stlib.visuals import VisualModel
from stlib.components import addOrientedBoxRoi
from splib.numerics import sin, cos
import math

from . s90servo import ServoMotor

mesh_path = os.path.dirname(os.path.abspath(__file__))+'/../../mesh/'

@SofaPrefab
class ServoArm(object):
    def __init__(self, parent, mappingInput, name="ServoArm", indexInput=0,indice=0):
        """ServoArm is a reusable sofa model of a servo arm for the S90 servo motor

           Parameters:
                parent:        node where the ServoArm will be attached
                mappingInput:  the rigid mechanical object that will control the orientation of the servo arm
                indexInput: (int) index of the rigid the ServoArm should be mapped to
        """
        self.node = parent.createChild(name)
        self.node.createObject("MechanicalObject",
                               name="dofs",
                               size=1,
                               template="Rigid3",
                               showObject=False,
                               showObjectScale=5,
                               translation2=[0, 25, 0])

        self.node.createObject('RigidRigidMapping',
                               name="mapping", input=mappingInput, index=indexInput)

        ## INVERSE #######################
        #actuator = self.node.createChild('actuator')
        #if indice == 0:
        #    actuator.createObject('SlidingActuator', name="SlidingActuator", template='Rigid3d', direction='0 0 0 1 0 0', indices=0, maxForce='150000', minForce='-150000') #,context=self.actuatedarms[0].ServoMotor.Angle.getLinkPath())
        #elif indice == 1:
        #    actuator.createObject('SlidingActuator', name="SlidingActuator", template='Rigid3d', direction='0 0 0 '+str(cos(4*math.pi/3))+' 0 '+str(sin(4*math.pi/3)), indices=0, maxForce='150000', minForce='-150000') #,context=self.actuatedarms[0].ServoMotor.Angle.getLinkPath())
        #else:
        #    actuator.createObject('SlidingActuator', name="SlidingActuator", template='Rigid3d', direction='0 0 0 '+str(cos(2*math.pi/3))+' 0 '+str(sin(2*math.pi/3)), indices=0, maxForce='150000', minForce='-150000') #,context=self.actuatedarms[0].ServoMotor.Angle.getLinkPath())
        #
        #actuator.activated = 0
        #####################################


        visual = VisualModel(self.node, mesh_path +'SG90_servoarm.stl', translation=[0., -25., 0.], color=[1., 1., 1., 0.75])
        visual.model.writeZTransparent = True
        visual.createObject('RigidMapping', name="mapping")


@SofaPrefab
class ActuatedArm(object):
    """ActuatedArm is a reusable sofa model of a S90 servo motor and the tripod actuation arm.
           Parameters:
             - translation the position in space of the structure
             - eulerRotation the orientation of the structure
             - attachingTo (MechanicalObject)    a rest shape forcefield will constraint the object
                                                 to follow arm position
           Structure:
           Node : {
                name : "ActuatedArm"
                MechanicalObject     // Rigid position of the motor
                ServoMotor           // The s90 servo motor with its actuated wheel
                ServoArm             // The actuation arm connected to ServoMotor.ServoWheel
            }
    """

    def __init__(self, parent, name="ActuatedArm",
                 translation=[0.0, 0.0, 0.0], eulerRotation=[0.0, 0.0, 0.0], attachingTo=None):

        self.node = parent.createChild(name)
        self.servomotor = ServoMotor(self.node, translation=translation, rotation=eulerRotation,indice=int(name[-1]))
        self.servoarm = ServoArm(self.node, self.servomotor.ServoWheel.dofs,indice=int(name[-1]))

        ## Create a public attribute and connect it to the private one.
        self.node.addNewData("angleIn", "ArmProperties", "angle of rotation (in radians) of the arm", "float", 0)
        self.node.ServoMotor.getData("angleIn").setParent(self.node.getData("angleIn"))

        ## Create a public attribute and connect it to the internal one.
        self.node.addNewData("angleOut", "ArmProperties", "angle of rotation (in radians) of the arm", "float", 0)
        self.node.getData("angleOut").setParent(self.node.ServoMotor.getData("angleOut"))

        if attachingTo is not None:
            constraint = self.addConstraint(attachingTo, translation, eulerRotation)
            attachingTo.createObject('RestShapeSpringsForceField', name="rssff"+name,
                                     points=constraint.BoxROI.getData("indices"),
                                     external_rest_shape=constraint.dofs,
                                     stiffness='1e12')

    def addConstraint(self, deformableObject, translation, eulerRotation):
        constraint = self.node.createChild("Constraint")
        o = addOrientedBoxRoi(constraint, position=deformableObject.dofs.getData("rest_position"),
                              translation=vec3.vadd(translation, [0.0, 25.0, 0.0]),
                              eulerRotation=eulerRotation, scale=[45, 15, 30])
        o.drawSize = 1
        o.drawBoxes = False

        constraint.createObject("TransformEngine", input_position="@BoxROI.pointsInROI",
                                translation=translation, rotation=eulerRotation, inverse=True)

        constraint.createObject("MechanicalObject", name="dofs",
                                template="Vec3d", position="@TransformEngine.output_position",
                                showObject=True, showObjectScale=5.0)

        constraint.createObject('RigidMapping', name="mapping", input=self.node.ServoMotor.ServoWheel.dofs, output="@./")

        return constraint

    def addBox(self, position, translation, eulerRotation):
        constraint = self.node.createChild("Box")
        o = addOrientedBoxRoi(constraint, position=position,
                              translation=vec3.vadd(translation, [0.0, 25.0, 0.0]),
                              eulerRotation=eulerRotation, scale=[45, 15, 30])
        o.init()


def createScene(rootNode):
    from splib.animation import animate
    from stlib.scene import Scene
    import math

    scene = Scene(rootNode)
    scene.VisualStyle.displayFlags = "showBehavior"
    rootNode.dt = 0.003
    rootNode.gravity = [0., -9810., 0.]

    simulation = rootNode.createChild("Simulation")
    simulation.createObject("EulerImplicitSolver", rayleighStiffness=0.1, rayleighMass=0.1)
    simulation.createObject("CGLinearSolver", name="precond")

    arm = ActuatedArm(simulation, name="ActuatedArm", translation=[0.0, 0.0, 0.0])

    def myanimate(target, factor):
        target.angleIn = math.cos(factor * 2 * math.pi)

    animate(myanimate, {"target": arm.ServoMotor}, duration=5, mode="loop")
