import os
from splib.objectmodel import SofaObject, SofaPrefab
from splib.animation import animate
from stlib.scene import Scene
from splib.numerics import sin, cos
import math

mesh_path = os.path.dirname(os.path.abspath(__file__))+'/../../mesh/'


def ServoBody(parent, position=[0., 0., 0., 0., 0., 0., 1.], showServo=False):

    servobody = parent.createChild("ServoBody")
    servobody.createObject("MechanicalObject", template="Rigid3d", name="dofs", position=position)
    servobody.createObject("MeshTopology")

    if showServo:
        visual = servobody.createChild("VisualModel")
        visual.createObject("MeshSTLLoader", name="loader", filename= mesh_path + "SG90_servomotor.stl")
        visual.createObject("MeshTopology", src="@loader")
        visual.createObject("OglModel", color=[0.15, 0.45, 0.75, 0.7], writeZTransparent=True)
        visual.createObject("RigidMapping", index=0)

    return servobody


def ServoWheel(parent, showWheel=False):

    servowheel = parent.createChild("ServoWheel")
    servowheel.createObject("MechanicalObject", template="Rigid3d", name="dofs", position=[[0., 0., 0., 0., 0., 0., 1.]],
                            showObject=showWheel, showObjectScale=10)
    servowheel.createObject("MeshTopology")

    return servowheel


@SofaPrefab
class ServoMotor(SofaObject):
    """A S90 servo motor

    This prefab is implementing a S90 servo motor.
    https://servodatabase.com/servo/towerpro/sg90

    The prefab ServoMotor is composed of:
    - a visual model
    - a mechanical model composed two rigids. One rigid is for the motor body
      while the other is implementing the servo rotating wheel.

    The prefab has the following parameters:
    - translation           to change default location of the servo (default [0.0,0.0,0.0])
    - rotation              to change default rotation of the servo (default [0.0,0.0,0.0,1])
    - scale                 to change default scale of the servo (default 1)
    - showServo             to control wether a visual model of the motor is added (default True)
    - showWheel             to control wether the rotation axis of the motor is displayed (default False)

    The prefab have the following property:
    - angle         use this to specify the angle of rotation of the servo motor
    - angleLimits   use this to set a min and max value for the servo angle rotation
    - position      use this to specify the position of the servo motor

    Example of use in a Sofa scene:

    def createScene(root):
        ...
        servo = ServoMotor(root)

        ## Direct access to the components
        servo.angle.value = 1.0
    """

    def __init__(self, parent,
                 translation=[0.0, 0.0, 0.0], rotation=[0.0, 0.0, 0.0], scale=[1.0, 1.0, 1.0], showServo=True, showWheel=False, indice=0):

        self.node = parent.createChild("ServoMotor")

        # The inputs
        self.node.addNewData("minAngle", "S90Properties", "min angle of rotation (in radians)", "float", -100)
        self.node.addNewData("maxAngle", "S90Properties", "max angle of rotation (in radians)", "float", 100)
        self.node.addNewData("angleIn", "S90Properties", "angle of rotation (in radians)", "float", 0)

        # Two positions (rigid): first one for the servo body, second for the servo wheel
        baseFrame = self.node.createChild("BaseFrame")
        baseFrame.createObject("MechanicalObject", name="dofs", template="Rigid3", position=[[0., 0., 0., 0., 0., 0., 1.], [0., 0., 0., 0., 0., 0., 1.]],
                               translation=translation, rotation=rotation, scale3d=scale)
        baseFrame.createObject("UniformMass")
        baseFrame.createObject("FixedConstraint",indices=[0])

        # Angle of the wheel
        angle = self.node.createChild("Angle")
        angle.createObject("MechanicalObject", name="dofs", template="Vec1d", position=self.node.getData("angleIn").getLinkPath())
        # This component is used to constrain the angle to lie between a maximum and minimum value,
        # corresponding to the limit of the real servomotor
        angle.createObject("ArticulatedHierarchyContainer")
        angle.createObject("ArticulatedSystemMapping", input1=angle.dofs.getLinkPath(), output=baseFrame.dofs.getLinkPath())
        # angle.createObject('StopperConstraint', name="AngleLimits", index=0, min=self.node.getData("minAngle").getLinkPath(), max=self.node.getData("maxAngle").getLinkPath())
        #angle.createObject("UncoupledConstraintCorrection")


        articulationCenter = angle.createChild("ArticulationCenter")
        articulationCenter.createObject("ArticulationCenter", parentIndex=0, childIndex=1, posOnParent=[0., 0., 0.], posOnChild=[0., 0., 0.])
        articulation = articulationCenter.createChild("Articulations")
        articulation.createObject("Articulation", translation=False, rotation=True, rotationAxis=[1, 0, 0], articulationIndex=0)

        # ServoBody and ServoWheel objects with visual
        servowheel = ServoWheel(self.node, showWheel=showWheel)
        servowheel.createObject("RigidRigidMapping", input=self.node.BaseFrame.dofs.getLinkPath(), output=servowheel.dofs.getLinkPath(), index=1)
        servobody = ServoBody(self.node, showServo=showServo)
        servobody.createObject("RigidRigidMapping", input=self.node.BaseFrame.dofs.getLinkPath(), output=servobody.dofs.getLinkPath(), index=0)

        ## INVERSE #######################
        # actuator = angle.createChild('actuator')
        # if indice == 0:
        #     actuator.createObject('SlidingActuator', name="SlidingActuator", template='Vec1', direction=[1], indices=0, maxForce='150000', minForce='-150000') #,context=self.actuatedarms[0].ServoMotor.Angle.getLinkPath())
        # elif indice == 1:
        #     actuator.createObject('SlidingActuator', name="SlidingActuator", template='Vec1', direction=[1], indices=0, maxForce='150000', minForce='-150000') #,context=self.actuatedarms[0].ServoMotor.Angle.getLinkPath())
        # else:
        #     actuator.createObject('SlidingActuator', name="SlidingActuator", template='Vec1', direction=[1], indices=0, maxForce='150000', minForce='-150000') #,context=self.actuatedarms[0].ServoMotor.Angle.getLinkPath())

        # actuator.activated = 0
        #####################################

        #'0 0 0 1 0 0'
        #'0 0 0 '+str(cos(4*math.pi/3))+' 0 '+str(sin(4*math.pi/3))
        #'0 0 0 '+str(cos(2*math.pi/3))+' 0 '+str(sin(2*math.pi/3))

        #angle.createObject("FixedConstraint")
        #servobody.createObject("FixedConstraint")
        #servowheel.createObject("FixedConstraint")

        # The output
        self.node.addNewData("angleOut", "S90Properties", "angle of rotation (in degree)", "float", angle.dofs.getData("position").getLinkPath())

        self.node.BaseFrame.init()
        self.node.BaseFrame.dofs.rotation = [0., 0., 0.]
        self.node.BaseFrame.dofs.translation = [0., 0., 0.]


def createScene(rootNode):

    import math

    def animation(target, factor):
        target.angleIn = math.cos(factor * 2 * math.pi)

    Scene(rootNode)

    rootNode.dt = 0.003
    rootNode.gravity = [0., -9810., 0.]
    rootNode.createObject("VisualStyle", displayFlags="showBehaviorModels")

    # Use these components on top of the scene to solve the constraint "StopperConstraint".
    rootNode.createObject("FreeMotionAnimationLoop")
    rootNode.createObject("GenericConstraintSolver", maxIterations=1e3, tolerance=1e-5)

    simulation = rootNode.createChild("Simulation")
    simulation.createObject("EulerImplicitSolver", rayleighStiffness=0.1, rayleighMass=0.1)
    simulation.createObject("CGLinearSolver", name="precond")

    ServoMotor(simulation, showWheel=True)
    animate(animation, {"target": simulation.ServoMotor}, duration=5., mode="loop")

    return rootNode
