# -*- coding: utf-8 -*-
"""
Step 9: Adding the rigidification to the tutorial.

"""
import os
from math import cos, sin, radians, pi
from stlib.scene import Scene
from stlib.physics.collision import CollisionMesh
from stlib.physics.rigid import Sphere
from stlib.visuals import VisualModel

from utility.tripod import Tripod
from utility.tripodcontroller import DirectController, InverseController, GoalController,CenterController

path = os.path.dirname(os.path.abspath(__file__))
path_mesh = path + "/../mesh/"
path_trajectory = path + '/trajectory/'

# new tripod
serialport1 = "/dev/ttyUSB0"
limit1 = [[132-91, 135-90, 132-90],[132, 135, 132]]
# old-new tripod
serialport2 = "/dev/ttyUSB1"
limit2 = [[45-5, 45-5, 45-3],[135+1, 135+4, 135]]

# # old tripod
# serialport2 = "/dev/ttyUSB1"
# limit2 = [[139-93, 135-96, 124-93],[139, 135, 124]]

trajectory = False

import Sofa
from splib.constants import Key

class PrintPos(Sofa.PythonScriptController): #Sofa.Core.Controller):

    def __init__(self, node):
        self.node = node

    def onKeyPressed(self, key):
        if key == Key.M:
            print([self.node.SlidingActuator0.force,self.node.SlidingActuator1.force,self.node.SlidingActuator2.force])

def coordWorkSpace(space=[100,100,100],shift=[0,0,0],sample=10.,remove=False):
    import numpy as np
    x = np.linspace(0, space[0], space[0]/sample+1) #(maxX-minX)/1000.+1)
    y = np.linspace(0, space[1], space[1]/sample+1) #(maxY-minY)/1000.+1)
    z = np.linspace(0, space[2], space[2]/sample+1) #(maxZ-minZ)/100.+1)
    x = [int(i) for i in x]
    y = [int(i) for i in y]
    z = [int(i) for i in z]

    coord = [[0,0,0]]*len(x)*len(y)*len(z)
    # print(space,nbr_sample)
    # print(x)
    count = 0
    for i in range(len(x)):
        for j in range(len(y)):
            for k in range(len(z)):
                # print(i,j,k)
                coord[count] = [x[i],y[j],z[k]]
                count +=1

    coord = [ [x-space[0]/2.,y-space[1]/2.,z-space[2]/2.] for x,y,z in coord]
    if remove:
        tol = 10
        indices = []
        tmp = []
        for i,pos in enumerate(coord):
            print(type(abs(int(pos[0]))),abs(int(pos[0])),i)
            # print(abs(int(pos[0])),int(space[0]/2)+1-15)
            if abs(pos[1]) > 8: # and abs(pos[1]) > 10:
                if pos not in tmp:
                    tmp.append(pos)
            elif abs(pos[0]) > 15 : # and abs(pos[1]) > 10:
                if pos not in tmp:
                    tmp.append(pos)
            elif abs(pos[2]) > 10 : # and abs(pos[1]) > 10:
                if pos not in tmp:
                    tmp.append(pos)


            # elif abs(pos[1]) < space[1]/2.-10:
            #     # print('1')
            #     print(space[1],pos)

            #     tmp.append(pos)

            #     indices.append(i)
            # elif abs(pos[2]) < space[2]/2.-10:
            #     print(space[2],pos)
            #     tmp.append(pos)

            #     indices.append(i)

        # tmp = list(dict.fromkeys(indices))
        # print("-----------------------")
        # print(len(tmp))
        # tmp = [coord[i] for i in tmp]
        # import random
        # random.shuffle(tmp)

        # for i in range(len(tmp)/2):
        #     tmp.pop(i)
        # print("#########################")
        # print(len(tmp),len(coord))
        # for i in coord:
        #     print(i)
        #     if i in indices:
        #         print("----------------> removed")
        #         coord.remove(tmp[i])
        # for i in coord:
        #     print(i)
        # print("#########################")
        # print(len(tmp),len(coord))

    return  [ [x-shift[0],y-shift[1],z-shift[2]] for x,y,z in tmp]

def crossWorkSpace(space=[5,5,5,5],shift=[0,0,0],cross=True,crossRange=4):
    if cross:coord = [[0,0,0]]*((space[0]+space[1]+space[2]+space[3]+4)*2*9+1+1000)
    else    :coord = [[0,0,0]]*((space[0]+space[1]+space[2]+space[3]+4)*2+1)
    print(len(coord))

    step = 2
    offset = 3

    seq1 = [[1,0],[1,1],[0,1],[-1,1],[-1,0],[-1,-1],[0,-1],[1,-1]]
    # seq1 = [[1,1],[-1,1],[-1,-1],[1,-1]]

    seq2 = [[0,2],[0,1],[1,2],[1,2]]

    count = 0

    for i in range(4):
        for j in [-1,1]:
            tmp = None
            if i == 0:
                tmp = [0,j,0]
                tmpseq2 = seq2[0]
            elif i == 1:
                tmp = [0,0,j]
                tmpseq2 = seq2[1]
            elif i == 2:
                tmp = [j*cos(120),0,j*sin(120)]
                tmpseq2 = seq2[2]
            elif i == 3:
                tmp = [j*cos(120),0,-j*sin(120)]
                tmpseq2 = seq2[3]

            for k in range(space[i]):
                tmp2 = [l*k*step if l != 0 else 0 for l in tmp]

                coord[count] = tmp2
                count +=1

                if k > offset:
                    for  m in range(1,crossRange+1):
                            for seq in seq1:
                                coord[count] = [n for n in tmp2]
                                coord[count][tmpseq2[0]] += seq[0] * step * m
                                coord[count][tmpseq2[1]] += seq[1] * step * m
                                count +=1

    coord[count] = [0,0,0]
    # coord = [ [x-space[0]/2.,y-space[1]/2.,z-space[2]/2.] for x,y,z in coord]
    return  [ [x-shift[0],y-shift[1],z-shift[2]] for x,y,z in coord]

def EffectorGoal(node, input=None,position=[0,0,0,-0.00253147,0.00289319,-0.707431,0.706772]):
    goal = node.createChild('goal')
    goal.createObject('EulerImplicitSolver', firstOrder=True)
    goal.createObject('CGLinearSolver', iterations=100, threshold=1e-5, tolerance=1e-5)
    goal.createObject('MechanicalObject', name='dofs', template='Rigid3d',
                      position=position, showObject=True, showObjectScale=5,drawMode=2) #position+[0., 0., 0., 1.] [0,0,0,-0.0910358,0.0910492,-0.70136,0.701083] [0,0,0,-0.272358,0.27292,-0.65379,0.651072]
    # if input:
    #     goal.createObject("RigidRigidMapping", name="mapping",
    #                                output=goal.dofs.getLinkPath(), index=2,
    #                                input=input.dofs.getLinkPath())

    # spheres = goal.createChild('spheres')
    # spheres.createObject('MechanicalObject', name='mo', position='0 0 0')
    # spheres.createObject('Sphere', radius=2, group=1)
    # spheres.createObject('RigidMapping')

    if trajectory:
        goal.createObject('AnimationEditor', filename="trajectory/goal_trajectory.txt", drawTimeline="1", listening="1", loop="1", frameTime=0.01)

    goal.createObject('UncoupledConstraintCorrection')
    return goal


# Description of how the communication is handled
# CHANGE HERE the serialport that correspond to your computer
# def SerialPortBridgeGeneric(rootNode, serialport="/dev/cu.usbserial-1420"):
# def SerialPortBridgeGeneric(rootNode, serialport="..."):
def SerialPortBridgeGeneric(rootNode, serialport="/dev/ttyUSB0"):
    return rootNode.createObject("SerialPortBridgeGeneric", port=serialport, baudRate=115200, size=3, listening=True,packetOut=[61,61,61])


def createScene(rootNode):
    # Choose here to control position or orientation of end-effector
    orientation = False;
    # ANISOTROPY
    ho = True
    # COLLISION
    collision = False

    # if orientation:
    #     # inverse in orientation
    #     goalNode = EffectorGoal(rootNode, [0, 0, 0])
    #     # goalNode = EffectorGoal(rootNode, [0, 50, 50])
    # else:
    #     # inverse in position
    #     goalNode = EffectorGoal(rootNode, [0, 0, 0])

    # # You can add a GoalController and play with it
    # GoalController(goalNode)

    # Scene set up
    scene = Scene(rootNode, gravity=[0.0, 0, -9810],plugins=['SofaOpenglVisual','SoftRobots','SoftRobots.Inverse','SofaHighOrderTopology','SofaHighOrderFEM','BeamAdapter'])
    # scene.addContact(alarmDistance=3, contactDistance=1, frictionCoef=0.08)
    scene.VisualStyle.displayFlags = "showForceFields" #"hideForceFields hideVisual showCollisionModels" #"showForceFields showCollisionModels"
    scene.createObject('BackgroundSetting', color=[0,0,0])
    # Inverse Solver
    scene.createObject("FreeMotionAnimationLoop")
    scene.createObject('QPInverseProblemSolver', name="QP", printLog=0,epsilon=0.01)

    if collision:
        scene.createObject('CollisionPipeline', verbose="0")
        scene.createObject('BruteForceDetection', name="N2")
        scene.createObject('CollisionResponse', response="FrictionContact", responseParams="mu=0")
        scene.createObject('LocalMinDistance', name="Proximity", alarmDistance=2, contactDistance=0.2, angleCone="0", coneFactor="0.5")


    simulation = scene.createChild("Simulation")
    simulation.createObject("EulerImplicitSolver", firstOrder=0, rayleighStiffness='0.01')
    simulation.createObject("SparseLDLSolver", name="sparseSolver",printLog=0)
    simulation.createObject("GenericConstraintCorrection", solverName='sparseSolver')

    # Serial port bridge
    serialTripod1 = SerialPortBridgeGeneric(rootNode,serialport=serialport1)
    serialTripod2 = SerialPortBridgeGeneric(rootNode,serialport=serialport2)

    # Transverse argument
    volumeMeshFileName=  path_mesh + "tripod_coarse_04.vtk"
    nbr_tretra = 2711
    translation=[0.0, -90, 0.0]
    rotation=[90, 0, 0]

    # [7.34788079488412e-15, -1.35, -60.0]
    # [0, 0.0, 0]

    totalMass=0.032

    #FOR 15% AND SIGMA 0.1
    youngModulusTransverse = 1390
    poissonRatioTransverse = 0.26162 #(yz)
    youngModulusLongitudinal = 94
    poissonRatioTransverseLongitudinal = 0.4161  #(zx)
    shearModulusLongitudinal = 16.28215
    poissonRatioLongitudinalTransverse = 0.02975 #(xy)
    ################################################

    # with spce between YM /3
    youngModulusTransverse = 1390
    poissonRatioTransverse = 0.26162 #(yz)
    youngModulusLongitudinal = 94
    poissonRatioTransverseLongitudinal = 0.4161  #(zx)
    shearModulusLongitudinal = 16.28215
    poissonRatioLongitudinalTransverse = 0.02975 #(xy)
    ################################################

    ########################################################################################################################################################
    ## TETRA & ANGLE
    ########################################################################################################################################################
    def tetra_and_angle(offset=150):
        directions_spiral = []

        angle_tetra = [189.57899456007425, 11.078174781957232, 12.505850018127802, 188.97571466592635, 190.21324445197283, 179.55541146130534, 12.057435284810632, 13.411648567560297, 295.3777610089732, 112.8278050514768, 141.30824434835137, 142.07218400637856, 79.88174291307536, 60.35353854227617, 191.12613600482337, 26.652020494679714, 293.02125731295877, 190.5924260530599, 154.38284669774842, 60.49063142073996, 191.13317255150733, 79.5139390425307, 141.30990304248303, 25.65709914984383, 80.91539126401847, 15.227226300213587, 149.79934755595897, 173.88881381488662, 332.39029522811376, 88.75665284021093,
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  48.09759350059707]
        angle_spiral = [i+offset+0 for i in angle_tetra] # +50
        directions_spiral = []
        for angle in angle_spiral:
            # print(angle,math.cos(radians(angle)),math.sin(angle))
            directions_spiral.append([sin(radians(angle)),0.0,cos(radians(angle))])

        return directions_spiral

    ########################################################################################################################################################
    ##   TRIPOD TRANSVERSE
    ########################################################################################################################################################
    def tripod_transverse(name="Tripod_HO",directions_spiral=None):

        youngModulus= [youngModulusTransverse]*nbr_tretra
        poissonRatio= [poissonRatioTransverse]*nbr_tretra
        transverse_anisotropy_coef = [[0,0,0,0]]*nbr_tretra
        anisotropyDirections = [[0,0,0]]*nbr_tretra

        for i,tetra in enumerate(directions_spiral):
            anisotropyDirections[i] = directions_spiral[i]
            transverse_anisotropy_coef[i] = [2,youngModulusLongitudinal,poissonRatioTransverseLongitudinal, shearModulusLongitudinal]

        # Create the tripod object.
        tripod = Tripod(rootNode,name=name, effectorPos=[0, 30, 0], use_orientation=orientation, goalNode=None,ho=ho,
                            elasticitySymmetry='transverseIsotropic', #transverseIsotropic', # 'isotropic',
                            translation=translation, rotation=rotation,
                            withAnysotropy=True,
                            volumeMeshFileName=volumeMeshFileName,
                            youngModulus=youngModulus, poissonRatio=poissonRatio, totalMass=totalMass,
                            anisotropyParameters=transverse_anisotropy_coef,anisotropyDirections = anisotropyDirections,color=[0,1,0],iterativeSolver=False)

        actuators = tripod.RigidifiedStructure.RigidParts.actuators

        node = scene.Simulation.createChild(name)

        node.createObject('MechanicalMatrixMapper',name="Spring",
                            template='Rigid3,Rigid3',
                            object1=tripod.RigidifiedStructure.RigidParts.dofs.getLinkPath(),
                            object2=tripod.RigidifiedStructure.RigidParts.dofs.getLinkPath(),
                            nodeToParse = tripod.RigidifiedStructure.RigidParts.spring.getLinkPath())
        if ho:
            node.createObject('MechanicalMatrixMapper',
                                template='Vec3,Rigid3',
                                object1=tripod.RigidifiedStructure.DeformableParts.getLinkPath(),
                                object2=tripod.RigidifiedStructure.RigidParts.dofs.getLinkPath(),
                                nodeToParse = tripod.ElasticBody.ElasticMaterialObject.highOrder_node.getLinkPath())

            node.addChild(tripod.ElasticBody.ElasticMaterialObject.highOrder_node)
            node.addChild(tripod.ActuatedArm0)
            node.addChild(tripod.ActuatedArm1)
            node.addChild(tripod.ActuatedArm2)
            node.addChild(tripod.RigidifiedStructure)

        else:
            print("---------------------------")
            node.createObject('MechanicalMatrixMapper',
                                template='Vec3,Rigid3',
                                object1=tripod.RigidifiedStructure.DeformableParts.getLinkPath(),
                                object2=tripod.RigidifiedStructure.RigidParts.dofs.getLinkPath(),
                                nodeToParse = tripod.ElasticBody.ElasticMaterialObject.getLinkPath())
            node.addChild(tripod)


        for i in range(3):
            visual = tripod.RigidifiedStructure.RigidParts.createChild("VisualModel")
            visual.createObject("MeshSTLLoader", name="loader", filename= path_mesh + "SG90_servoarm.stl",translation=[0, 0, 0])#,rotation=[0, 0, 180],translation=[0, 90, 0])
            visual.createObject("MeshTopology", src="@loader")
            visual.createObject("OglModel", color=[0.75, 0.75, 0.75, 0.7], writeZTransparent=True)
            visual.createObject("RigidMapping", index=i)

        return tripod

    ########################################################################################################################################################
    ##   TWO TRIPOD CONFIGURATION
    ########################################################################################################################################################
    def two_tripod():

        top = tripod_transverse(name="top",directions_spiral=tetra_and_angle(offset=60)) # 80
        bottom = tripod_transverse(name="bottom",directions_spiral=tetra_and_angle(offset=60))

        # MultipleTripodController(scene,[top,bottom])

        ## BilateralInteractionConstraint
        # left = scene.Simulation.createChild('left')
        # left.createObject('MechanicalObject', name='dofs', template='Rigid3d',position=[0,30,0,0,0,0,1],showObject=True,showObjectScale=5)
        # left.createObject('RigidRigidMapping',input=top.RigidifiedStructure.RigidParts.dofs,output=left.dofs,index=3) #,initialPoints=position+orientation)

        # right = scene.Simulation.createChild('right')
        # right.createObject('MechanicalObject', name='dofs', template='Rigid3d',position=[0,30,0,0,0,1,0],showObject=True,showObjectScale=5)
        # right.createObject('RigidRigidMapping',input=bottom.RigidifiedStructure.RigidParts.dofs,output=right.dofs,index=3) #,initialPoints=position+orientation)

        # scene.Simulation.createObject('BilateralInteractionConstraint',template="Rigid3", object1=right.dofs, object2=left.dofs, first_point=0, second_point=0) #,keepOrientationDifference=True)
        # CenterController(left)
        ####################################################


        goalNode = EffectorGoal(rootNode,position=[0,0,0,0.3535534, -0.3535534, -0.6123724, 0.6123724]) # 0,0.00289319,-0.707431,0.706772]) (euler rotation = [0,-60,-90])
        phantom = scene.createChild("phantom")
        # phantom.createObject("MeshSTLLoader", name="loader", filename= path_trajectory + "sphere.stl",rotation=[0,0,90])
        # phantom.createObject("MeshTopology", src="@loader")
        # phantom.createObject("OglModel", color=[1, 0, 0, 0.2], writeZTransparent=True) #[0.75, 0.75, 0.75, 0.7]
        # phantom.createObject('MechanicalObject', name='dofs',position=coordWorkSpace(space=[40,20,30],shift=[0,-10,0],sample=6) ,showObject=True,drawMode=1,showObjectScale=0.5)
        # phantom.createObject('MechanicalObject', name='dofs',position=coordWorkSpace(space=[40,20,30],shift=[0,-10,0],sample=5,remove=True) ,showObject=True,drawMode=1,showObjectScale=0.5)
        # phantom.createObject('MechanicalObject', name='dofs',position=crossWorkSpace(space=[5,5,5,5],shift=[0,0,0],cross=True) ,showObject=True,drawMode=1,showObjectScale=0.5,showColor=[1,1,1,0.2])

        ##############################################################

        # current video workspace exploration with angle_offset = 3 pos_offset = 1  step = 2 offset = 3 self.stepAngle = 5 self.step = 6s
        phantom.createObject('MechanicalObject', name='dofs',position=crossWorkSpace(space=[8,10,11,11],shift=[0,0,0],cross=True) ,showObject=False,drawMode=1,showObjectScale=0.5,showColor=[1,1,1,0.2])
        #RESULTS :
        # [[0.0, 0.0, 0.0], [0.0, -2.0, 0.0], [0.0, -4.0, 0.0], [0.0, -6.0, 0.0], [0.0, -8.0, 0.0], [2.0, -8.0, 0.0], [2.0, -8.0, 2.0], [0.0, -8.0, 2.0], [-2.0, -8.0, 2.0], [-2.0, -8.0, 0.0],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[0.0, 0.0, 0.0]]
        # ------------------------------------------------
        # [[-6.0, -8.0, 0.0], [-6.0, -8.0, -6.0], [0.0, -8.0, -6.0], [-8.0, -8.0, 8.0], [8.0, -8.0, -8.0], [-2.0, -10.0, -2.0], [4.0, -10.0, 0.0], [0.0, -10.0, 6.0], [0.0, -10.0, -8.0], [-8.0, 8.0, 8.0],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[16.283619410531237, 0.0, -9.612223684246285]]
        # ------------------------------------------------
        # [[-4.0, -8.0, -4.0], [-2.0, -10.0, 2.0], [-4.0, -10.0, -4.0], [4.0, -10.0, -4.0], [-6.0, -10.0, 6.0], [0.0, -10.0, -6.0], [0.0, -10.0, 8.0], [-8.0, -10.0, 0.0], [0.0, 10.0, 6.0], [8.0, 10.0, 0.0],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[16.283619410531237, -2.0, -9.612223684246285]]
        # ------------------------------------------------
        # [[-8.0, -8.0, 0.0], [-8.0, -8.0, -8.0], [6.0, -10.0, 0.0], [6.0, -10.0, 6.0], [6.0, -10.0, -6.0], [0.0, -12.0, 2.0], [-2.0, -12.0, 2.0], [-2.0, -12.0, 0.0], [4.0, -12.0, 0.0], [-4.0, -12.0, 4.0],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[16.283619410531237, 0.0, -7.612223684246285]]
        # ------------------------------------------------
        # [[0.0, -8.0, -8.0], [-4.0, -10.0, 0.0], [0.0, -10.0, -4.0], [-6.0, -10.0, 0.0], [-6.0, -10.0, -6.0], [8.0, -10.0, 0.0], [8.0, -10.0, 8.0], [-8.0, -10.0, 8.0], [-8.0, -10.0, -8.0], [8.0, -10.0, -8.0],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[16.283619410531237, 8.0, -19.612223684246285]]

        ##############################################################

        # sphere_pos = [[2.995059967041016, 2.1020998954772945, 9.306489944458008], [2.7448048657425215e-15, 5.87785005569458, 8.090169906616211], [2.8593901259246494e-31, 6.123229763063307e-16, 10.0], [1.86555004119873, -1.6793099641799931, 9.67986011505127], [2.7448048657425215e-15, 5.87785005569458, -8.090169906616211], [2.822020053863526, 1.7971700429916375, -9.423709869384766], [2.8593901259246494e-31, 6.123229763063307e-16, -10.0], [1.6055099964141841, -1.965520024299622, -9.672590255737305], [6.635200023651123, -0.010304099880160374, 7.481579780578613], [5.8527398109436035, -1.3852000236511244, -7.989160060882568],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[-8.651689529418947, -4.913929939270018, -1.0007699728012085]]
        # position =[]
        # import numpy
        # for j in numpy.arange(0.5,2.75,0.25):
        #     for i in sphere_pos:
        #         position.append([i[0]*j,i[1]*j,i[2]*j])

        # phantom.createObject('MechanicalObject', name='dofs',position=position ,showObject=True,drawMode=1,showObjectScale=0.5,showColor=[1,1,1,0.2])


        ##############################################################

        # x = [0, 3, 6, 9]
        # y = [0, 3, 6, 9]
        # z = [0, 3, 6, 9]

        # coord = [[0,0,0]]*4**3
        # # print(space,nbr_sample)
        # # print(x)
        # count = 0
        # for i in range(len(x)):
        #     for j in range(len(y)):
        #         for k in range(len(z)):
        #             # print(i,j,k)
        #             coord[count] = [x[i],y[j],z[k]]
        #             count +=1

        # coord = [ [x-9/2.,y-9/2.,z-9/2.] for x,y,z in coord]
        # # space -5/5
        # # coord += [[0.0, 0.0, 0.0], [0.0, -2.0, 0.0], [0.0, -4.0, 0.0], [0.0, -6.0, 0.0], [0.0, -8.0, 0.0], [2.0, -8.0, 0.0], [2.0, -8.0, 2.0], [0.0, -8.0, 2.0], [-2.0, -8.0, 2.0], [-2.0, -8.0, 0.0],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[16.283619410531237, 0.0, -5.612223684246285]]
        # # space -10/10
        # coord = [[0,0,0],[0.0, 0.0, -2.0],[0.0, 0.0, -4.0],[0.0, 0.0, -6.0],[0.0, 0.0, -8.0],[0.0, 0.0, -10.0], [2.0, 0.0, -10.0], [2.0, 2.0, -10.0], [0.0, 2.0, -10.0], [-2.0, 2.0, -10.0],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[16.283619410531237, 0.0, -5.612223684246285]]
        # # explore reachable with more constrain
        # coord = [[0.0, 0.0, 0.0], [0.0, -2.0, 0.0], [0.0, -4.0, 0.0], [0.0, -6.0, 0.0], [0.0, -8.0, 0.0], [2.0, -8.0, 0.0], [2.0, -8.0, 2.0], [0.0, -8.0, 2.0], [-2.0, -8.0, 2.0], [-2.0, -8.0, 0.0],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[8.0, 0.0, 18.0]]


        # coord = [[0.0, 0.0, 0.0], [0.0, -2.0, 0.0], [0.0, -4.0, 0.0], [0.0, -6.0, 0.0], [0.0, -8.0, 0.0], [2.0, -8.0, 0.0], [2.0, -8.0, 2.0], [0.0, -8.0, 2.0], [-2.0, -8.0, 2.0], [-2.0, -8.0, 0.0],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[0.0, 0.0, 0.0]]

        # phantom.createObject('MechanicalObject', name='dofs',position=coord ,showObject=True,drawMode=1,showObjectScale=0.5,showColor=[1,1,1,0.2])
        # print("--------- len(coord)  " + str(len(coord)))

        ##############################################################

        # t1=[[0.0, 0.0, 0.0], [0.0, -2.0, 0.0], [0.0, -4.0, 0.0], [0.0, -6.0, 0.0], [0.0, -8.0, 0.0], [2.0, -8.0, 0.0], [2.0, -8.0, 2.0], [0.0, -8.0, 2.0], [-2.0, -8.0, 2.0], [-2.0, -8.0, 0.0],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[16.283619410531237, 0.0, -5.612223684246285]]
        # t2=[[0.0, 0.0, 0.0], [0.0, -2.0, 0.0], [0.0, -4.0, 0.0], [0.0, -6.0, 0.0], [0.0, -8.0, 0.0], [2.0, -8.0, 0.0], [2.0, -8.0, 2.0], [0.0, -8.0, 2.0], [-2.0, -8.0, 2.0], [-2.0, -8.0, 0.0],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[0.0, 0.0, 0.0]]
        # t3=[[0.0, 0.0, 0.0], [0.0, -2.0, 0.0], [0.0, -4.0, 0.0], [0.0, -6.0, 0.0], [0.0, 0.0, 0.0], [0.0, 2.0, 0.0], [0.0, 4.0, 0.0], [0.0, 6.0, 0.0], [0.0, 8.0, 0.0], [-2.0, 8.0, 0.0],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[8.141809705265619, 0.0, 0.19388815787685765]]
        # t1 = [i if i[1] >= 0 else [0,0,0] for i in t1]
        # t2 = [i if i[1] >= 0 else [0,0,0] for i in t2]
        # t3 = [i if i[1] >= 0 else [0,0,0] for i in t3]

        ##############################################################

        workspaceVisu = []
        color = [[51.,255.,243.,255],[116.,255.,51.,255],[252.,255.,51.,255],[255,168,51,255],[255,51,51,255]]
        color = [ [j/255. for j in i] for i in color]
        scale = 0.7


        workspaceVisu.append(phantom.createObject('MechanicalObject', name='Visu3Tr3rot',position=[],showObject=False,drawMode=1,showObjectScale=scale,showColor=color[0]))
        workspaceVisu.append(phantom.createObject('MechanicalObject', name='Visu3Tr2rot',position=[],showObject=False,drawMode=1,showObjectScale=scale,showColor=color[1]))
        workspaceVisu.append(phantom.createObject('MechanicalObject', name='Visu3Tr1rot',position=[],showObject=False,drawMode=1,showObjectScale=scale,showColor=color[2]))
        workspaceVisu.append(phantom.createObject('MechanicalObject', name='Visu3Tr',position=[],showObject=False,drawMode=1,showObjectScale=scale,showColor=color[3]))
        workspaceVisu.append(phantom.createObject('MechanicalObject', name='Nothing',position=[],showObject=False,drawMode=1,showObjectScale=scale,showColor=color[4]))

        # phantom.createObject('MechanicalObject', name='VisuTranslationAndRotation',showObject=True,drawMode=1,showObjectScale=0.5)

        # phantom.createChild("sphere")
        # for
        #     spheres.createObject('Sphere', radius=2, group=1)

        # VisualModel(parent=scene.Simulation, surfaceMeshFileName="mesh/ball.obj",scale=[2.5, 2.5, 2.5])
        # phantom = scene.createChild("phantom2")
        # phantom.createObject("MeshSTLLoader", name="loader", filename= path_trajectory + "custom.stl",rotation=[0,0,90],scale=0.5)
        # phantom.createObject("MeshTopology", src="@loader")
        # phantom.createObject("OglModel", color=[0, 1, 0, 0.3], writeZTransparent=True) #[0.75, 0.75, 0.75, 0.7]
        # phantom.createObject('MechanicalObject', name='dofs')
        # PrintPos(visual)

        rigid_center = scene.Simulation.createChild("rigid_center")
        rigid_center.createObject("MechanicalObject", template='Rigid3d',name='dofs',
                                                      position=[0,0,0,0.3535534, -0.3535534, -0.6123724, 0.6123724],
                                                      # position=[0,0,0,0,0,-sin(pi/4),cos(pi/4)],
                                                      # position=[0,0,0,0,0,0,1],
                                                      showObject=True,showObjectScale=5,drawMode=3)
        rigid_center.createChild("posEffector")
        # rigid_center.posEffector.createObject('PositionEffector', name='effector', template='Rigid3d', useDirections='1 1 1 0 0 0', indices='0', effectorGoal=goalNode.dofs.getLinkPath()+".position", limitShiftToTarget=True, maxShiftToTarget=5)
        # rigid_center.posEffector.createObject('PositionEffector', name='effector', template='Rigid3d', useDirections='0 0 0 1 1 1', indices='0', effectorGoal=goalNode.dofs.getLinkPath()+".position", limitShiftToTarget=True, maxShiftToTarget=5)
        rigid_center.posEffector.createObject('PositionEffector', name='effector', template='Rigid3d',
            useDirections='1 1 1 1 1 1',directions=[[0.01,0,0,0,0,0],[0,0.01,0,0,0,0],[0,0,0.01,0,0,0],[0,0,0,1,0,0],[0,0,0,0,1,0],[0,0,0,0,0,1]],
            indices='0', effectorGoal=goalNode.dofs.getLinkPath()+".position", limitShiftToTarget=True, maxShiftToTarget=5)
        rigid_center.posEffector.activated = 0

        GoalController(goalNode,scene.phantom,rigid_center,workspaceVisu)


        ## BeamInterpolation
        multiMapping = top.RigidifiedStructure.RigidParts.createChild("Beam")
        multiMapping.createObject('MechanicalObject', name='dofs', template='Rigid3d',position=[[0,0,0,0,0,0,1],[0,0,0,0,0,0,1],[0,0,0,0,0,0,1]],showObject=False,showObjectScale=20)
        multiMapping.createObject('SubsetMultiMapping',template="Rigid3,Rigid3",input=top.RigidifiedStructure.RigidParts.dofs.getLinkPath() + " " + rigid_center.dofs.getLinkPath() + " " + bottom.RigidifiedStructure.RigidParts.dofs.getLinkPath(),output=multiMapping.dofs.getLinkPath(),indexPairs=[0,3,1,0,2,3])
        multiMapping.createObject('Mesh',position=[[0,0,0],[0,0,0],[0,0,0]],edges=[0,1,1,2])
        multiMapping.createObject('BeamInterpolation',dofsAndBeamsAligned=False,defaultYoungModulus=10e10,
                                                      DOF0TransformNode0=[[0,0,0,-0.3535534, -0.3535534, -0.6123724, -0.6123724],[0,0,0,0,0,0,1]],
                                                      DOF1TransformNode1=[[0,0,0,0,0,0,1],[0,0,0,0.3535534, -0.3535534, -0.6123724, 0.6123724]],
                                                      # DOF0TransformNode0=[[0,0,0,0,0,sin(pi/4),cos(pi/4)],[0,0,0,0,0,0,1]],
                                                      # DOF1TransformNode1=[[0,0,0,0,0,0,1],[0,0,0,0,0,-sin(pi/4),cos(pi/4)]],
                                                      lengthList=[40,40],straight=True,printLog=0)
        multiMapping.createObject('AdaptiveBeamForceFieldAndMass',interpolation=multiMapping.BeamInterpolation.getLinkPath(),printLog=0,massDensity=0)

        if collision:
            visual = multiMapping.createChild("VisualModel")
            visual.createObject("MeshSTLLoader", name="loader", filename= path_mesh + "maze.stl",translation=[-51.5, -51.5, 6])#,rotation=[0, -90, 0])#,translation=[0, 90, 0])
            visual.createObject("MeshTopology", src="@loader")
            visual.createObject("OglModel", color=[51./255., 199./255., 232./255, 1], writeZTransparent=True) #[0.75, 0.75, 0.75, 0.7]
            visual.createObject("RigidMapping", index=1)

            collisionmodel = CollisionMesh(scene.Simulation, surfaceMeshFileName=path_mesh + "maze.stl", name="CollisionModel",
                                            translation=[-51.5, -51.5, 0],rotation=[0, 0, 0], collisionGroup=1,
                                            mappingType="RigidMapping",input=multiMapping.dofs.getLinkPath())
            collisionmodel.RigidMapping.index = 1
            collisionmodel.TPointModel.color=[0.5,0.5,0.5,1]
            collisionmodel.TLineModel.color=[0.5,0.5,0.5,1]
            collisionmodel.TTriangleModel.color=[0.5,0.5,0.5,1]

            # collisionmodel.createObject('LinearSolverConstraintCorrection')

        bottom.RigidifiedStructure.RigidParts.addChild(multiMapping)
        rigid_center.addChild(multiMapping)

        scene.Simulation.createObject('MechanicalMatrixMapper',name='MMM_Beam'+top.name,
                            template='Rigid3,Rigid3',
                            object1=top.RigidifiedStructure.RigidParts.dofs.getLinkPath(),
                            object2=rigid_center.dofs.getLinkPath(),
                            nodeToParse = "@/Simulation/top/RigidifiedStructure/RigidParts/Beam")#multiMapping.getLinkPath())
        scene.Simulation.createObject('MechanicalMatrixMapper',name='MMM_Beam'+bottom.name,
                            template='Rigid3,Rigid3',
                            object1=rigid_center.dofs.getLinkPath(),
                            object2=bottom.RigidifiedStructure.RigidParts.dofs.getLinkPath(), skipJ1tKJ1=True,
                            nodeToParse = "@/Simulation/top/RigidifiedStructure/RigidParts/Beam")#multiMapping.getLinkPath())


        invCtr= InverseController(rootNode, rigid_center, top.RigidifiedStructure.RigidParts.actuators, top.RigidifiedStructure.RigidParts.actuators, top.RigidifiedStructure.RigidParts, top, serialTripod1, [top.ActuatedArm0, top.ActuatedArm1, top.ActuatedArm2],
            limitLow=limit1[0],limitHigh=limit1[1])
        DirectController(rootNode, [top.ActuatedArm0,
                                    top.ActuatedArm1,
                                    top.ActuatedArm2], invCtr)        # The regular controller that is being used for the last 2 steps
        invCtr = InverseController(rootNode, rigid_center, bottom.RigidifiedStructure.RigidParts.actuators, bottom.RigidifiedStructure.RigidParts.actuators, bottom.RigidifiedStructure.RigidParts, bottom, serialTripod2, [bottom.ActuatedArm0, bottom.ActuatedArm1, bottom.ActuatedArm2],
            limitLow=limit2[0],limitHigh=limit2[1])
        DirectController(rootNode, [bottom.ActuatedArm0,
                                    bottom.ActuatedArm1,
                                    bottom.ActuatedArm2], invCtr)
        top.RigidifiedStructure.RigidParts.actuators.activated = 0
        bottom.RigidifiedStructure.RigidParts.actuators.activated = 0
        ####################################################

        if collision:
            spheres = scene.Simulation.createChild("spheres")
            spheres.createObject("MechanicalObject",template="Vec3d", name="dofs", position=[0,0,20],  restScale="1",  reserve="0" )
            spheres.createObject("UniformMass")
            spheres.createObject("SphereCollisionModel", template="Vec3d", name="tSphereModel46",  radius=2.5, color=[1,0,0,1])

            # mapping = spheres.createChild("map")
            # mapping.createObject("MechanicalObject",template="Rigid3d", name="dofs")
            # mapping.createObject('RigidMapping')

            #### visualization
            # objectVisu = VisualModel(parent=spheres, surfaceMeshFileName="mesh/ball.obj",scale=[2.5, 2.5, 2.5])
            # objectVisu.createObject('RigidMapping')

            # objectVisu.createObject("Mesh",src=objectVisu.loader.getLinkPath())
            # objectVisu.createObject("MechanicalObject")
            # objectVisu.createObject('BarycentricMapping')

        # CenterController(rigid_center)

        # PrintPos(top.RigidifiedStructure.RigidParts.actuators)
        # PrintPos(bottom.RigidifiedStructure.RigidParts.actuators)


    ########################################################################################################################################################
    two_tripod()
